*Heading
** Job name: Job-1 Model name: Model-1
** Generated by: Abaqus/CAE 2018
*Preprint, echo=NO, model=NO, history=NO, contact=NO
**
** PARTS
**
*Part, name=PART-DEFAULT
*Node
      1,  0.899999976,  0.600000024,           0.
      2,           0.,  0.600000024,           0.
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*Element, type=STRI3
    1,     1,     3,   601
    2,     1,   601,   600
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*Nset, nset=AllNodes, generate
     1,  21901,      1
*Elset, elset=AlleElemente, generate
     1,  43200,      1
*Nset, nset=ExcitationPoint
 18465,
*Nset, nset=BcSet_top_bottom
   1,   2,   3,   4,   5,   6
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*Nset, nset=BcSet_left_right
   1,   2, 182, 183, 184, 185
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*Nset, nset=BcSet, generate
   1,  600,    1
** Section: Section-1
*Shell Section, elset=AlleElemente, material=Aluminium
0.003, 5
*End Part
**
**
** ASSEMBLY
**
*Assembly, name=Assembly
**
*Instance, name=Instance, part=PART-DEFAULT
*End Instance
**
*Spring, elset=Springs_rx-spring
4
100.
*Element, type=Spring1, elset=Springs_rx-spring
1, Instance.1
2, Instance.2
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*Spring, elset=Springs_ry-spring
5
100.
*Element, type=Spring1, elset=Springs_ry-spring
363, Instance.1
364, Instance.2
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*End Assembly
**
** MATERIALS
**
*Material, name=Aluminium
*Damping, structural=0.02
*Density
2700.,
*Elastic
 7e+10, 0.3
**
** BOUNDARY CONDITIONS
**
** Name: BC-1 Type: Displacement/Rotation
*Boundary
Instance.BcSet, 3, 3
** ----------------------------------------------------------------
**
** STEP: modal_analysis
**
*Step, name=modal_analysis, nlgeom=NO, perturbation
*Frequency, eigensolver=Lanczos, sim, acoustic coupling=on, normalization=mass
, 0.5, 600., , ,
**
** OUTPUT REQUESTS
**
*Restart, write, frequency=0
**
** FIELD OUTPUT: F-Output-1
**
*Output, field, variable=PRESELECT
*End Step
** ----------------------------------------------------------------
**
** STEP: direct_analysis
**
*Step, name=direct_analysis, nlgeom=NO, perturbation
*Steady State Dynamics
1., 300., 30, 2.
**
** LOADS
**
** Name: Load-1   Type: Concentrated force
*Cload, real
Instance.ExcitationPoint, 3, 1.
**
** OUTPUT REQUESTS
**
**
** FIELD OUTPUT: DirectSolution
**
*Output, field
*Node Output
V,
**
** FIELD OUTPUT: F-Output-1
**
*Output, field, variable=PRESELECT
**
** HISTORY OUTPUT: H-Output-1
**
*Output, history, variable=PRESELECT
*End Step
